// SBML level 3 version 1

model exercise()

  // Compartments:
  compartment cytoplasm = 1;

  // Species:
  species _N in cytoplasm = 36;
  species _G in cytoplasm = 10;
  species _D in cytoplasm = 10;
  species _K in cytoplasm = 48;
  species Np in cytoplasm = 0;
  species Gp in cytoplasm = 0;
  species Dp in cytoplasm = 0;
  species Kp in cytoplasm = 0;

  // Parameters:
  _k_Np = 0.1;
  S = 0;
  _k_Nd = 0.1;
  _k_Gp = 0.1;
  _k_Gd = 0.1;
  I1 = 0;
  _k_Dp = 0.1;
  _k_Dd = 0.1;
  I2 = 0;
  _k_KpN = 0.1;
  _k_KpG = 0.1;
  _k_Kd = 0.1;

  // Reactions:
  RpN: _N -> Np; _k_Np*_N*S;
  RdN: Np -> _N; _k_Nd*Np*Dp;  // modifiers: Dp
  RpG: _G -> Gp; _k_Gp*_G*Np;  // modifiers: Np
  RdG: Gp -> _G; _k_Gd*Gp*I1;
  RpD: _D -> Dp; _k_Dp*_D*Gp;  // modifiers: Gp
  RdD: Dp -> _D; _k_Dd*Dp*I2;
  RpK: _K -> Kp; (_k_KpN*Np + _k_KpG*Gp)*_K;  // modifiers: Np, Gp
  RdK: Kp -> _K; _k_Kd*Kp;
end
