// SBML level 3 version 1

model myTest()

  // Compartments:
  compartment cytoplasm = 1;

  // Species:
  species S in cytoplasm = 10;
  species E in cytoplasm = 0;
  species I in cytoplasm = 20;
  species P in cytoplasm = 0;
  species ES in cytoplasm = 0;
  species EI in cytoplasm = 1;

  // Parameters:
  k_es = 1;
  k_ei = 1;
  k_res = 1;
  k_rei = 1;
  k_cat = 0.1;
  k_Igen = 10;
  k_Pinh = 10;
  k_Ideg = 1;
  k_Pdeg = 0.1;
  k_Sdeg = 1;
  k_Sinp = 1;

  // Assignment rules:
  ProS := piecewise(0.1, time > 55, 20, time > 45, 0.1);

  // Reactions:
  R1: E + S -> ES; k_es*E*S;
  R2: E + I -> EI; k_ei*E*I;
  R3: ES -> E + S; k_res*ES;
  R4: EI -> E + I; k_rei*EI;
  R5: ES -> E + P; k_cat*ES;
  R6: -> I; k_Igen/(1 + k_Pinh*P);  // modifiers: P
  R7: I -> ; k_Ideg*I;
  R8: P -> ; k_Pdeg*P;
  R9: S -> ; k_Sdeg*S;
  R10: -> S; k_Sinp*ProS;
end
